Jet Trainer (auto-generated by avlnn.geometry)
#Mach
0.0
#IYsym  IZsym  Zsym
0      0      0.0
#Sref   Cref   Bref
11.73219  1.21509  10.83152
#Xref   Yref   Zref
-0.11197  0.0  0.0
SURFACE
Wing
8   1.0   20   -2.0
YDUPLICATE
0.0

SECTION
-0.99492  0.0  0.0  1.73793  -2.9554
NACA
2312

SECTION
-0.31771  3.13756  0.24815  0.97925  -2.9554
NACA
2312
CONTROL
aileron   1.0   0.6546   0. 0. 0.   -1.0

SECTION
0.17401  5.41576  0.42833  0.42838  -2.9554
NACA
2312
CONTROL
aileron   1.0   0.6546   0. 0. 0.   -1.0


SURFACE
Horizontal Tail
8   1.0   12   -1.5
YDUPLICATE
0.0

SECTION
6.25192  0.0  0.0  0.54443  0.0
CONTROL
elevator   1.0   0.5000   0. 1. 0.   1.0

SECTION
6.39381  1.61132  0.0  0.54443  0.0
CONTROL
elevator   1.0   0.5000   0. 1. 0.   1.0


SURFACE
Vertical Tail
8   1.0   12   1.0

SECTION
2.64568  0.0  0.0  1.06442  0.0
CONTROL
rudder   1.0   0.5000   0. 0. 1.   1.0

SECTION
3.73235  0.0  3.15846  1.06442  0.0
CONTROL
rudder   1.0   0.5000   0. 0. 1.   1.0
