# Auto-generated by avlnn.massfile -- do not edit by hand
Lunit = 1.0 m
Munit = 1.0 kg
Tunit = 1.0 s

g   = 9.80665
rho = 0.36392

#  mass      x         y         z        Ixx  Iyy  Izz  Ixy  Ixz  Iyz
     120.0000   -3.00000    0.37500    0.37500   0.0  0.0  0.0  0.0  0.0  0.0
     120.0000   -3.00000    0.37500   -0.37500   0.0  0.0  0.0  0.0  0.0  0.0
     120.0000   -3.00000   -0.37500    0.37500   0.0  0.0  0.0  0.0  0.0  0.0
     120.0000   -3.00000   -0.37500   -0.37500   0.0  0.0  0.0  0.0  0.0  0.0
     120.0000   -1.50000    0.37500    0.37500   0.0  0.0  0.0  0.0  0.0  0.0
     120.0000   -1.50000    0.37500   -0.37500   0.0  0.0  0.0  0.0  0.0  0.0
     120.0000   -1.50000   -0.37500    0.37500   0.0  0.0  0.0  0.0  0.0  0.0
     120.0000   -1.50000   -0.37500   -0.37500   0.0  0.0  0.0  0.0  0.0  0.0
     120.0000    0.00000    0.37500    0.37500   0.0  0.0  0.0  0.0  0.0  0.0
     120.0000    0.00000    0.37500   -0.37500   0.0  0.0  0.0  0.0  0.0  0.0
     120.0000    0.00000   -0.37500    0.37500   0.0  0.0  0.0  0.0  0.0  0.0
     120.0000    0.00000   -0.37500   -0.37500   0.0  0.0  0.0  0.0  0.0  0.0
     120.0000    1.50000    0.37500    0.37500   0.0  0.0  0.0  0.0  0.0  0.0
     120.0000    1.50000    0.37500   -0.37500   0.0  0.0  0.0  0.0  0.0  0.0
     120.0000    1.50000   -0.37500    0.37500   0.0  0.0  0.0  0.0  0.0  0.0
     120.0000    1.50000   -0.37500   -0.37500   0.0  0.0  0.0  0.0  0.0  0.0
     120.0000    3.00000    0.37500    0.37500   0.0  0.0  0.0  0.0  0.0  0.0
     120.0000    3.00000    0.37500   -0.37500   0.0  0.0  0.0  0.0  0.0  0.0
     120.0000    3.00000   -0.37500    0.37500   0.0  0.0  0.0  0.0  0.0  0.0
     120.0000    3.00000   -0.37500   -0.37500   0.0  0.0  0.0  0.0  0.0  0.0
     800.0000   -0.27992    1.80525    0.00000   0.0  0.0  0.0  0.0  0.0  0.0
     800.0000   -0.27992   -1.80525    0.00000   0.0  0.0  0.0  0.0  0.0  0.0
